*Heading
 MQ-1 Drone 600m/s Building Impact
** Job name: Job-DroneImpact Model name: Drone-Impact
** Generated by: Abaqus/CAE 2025
*Preprint, echo=NO, model=NO, history=NO, contact=NO
**
** PARTS
**
*Part, name=Drone
*Node
      1,  -433.012695,         250.,           0.
      2,  -433.012695,        -250.,           0.
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*Element, type=C3D8R
 1,  13,  12,  14,   8,   6,   5,   7,   1
 2,  10,  14,  12,  11,   3,   7,   5,   4
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*Nset, nset=_PickedSet2, internal, generate
   1,  119,    1
*Elset, elset=_PickedSet2, internal, generate
  1,  48,   1
** Section: Sec_Drone
*Solid Section, elset=_PickedSet2, controls=EC-1, material=Aluminum_7075
,
*End Part
**
*Part, name=Wall
*Node
      1,        2500.,       10000.,         500.
      2,        2500.,        9500.,         500.
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*Element, type=C3D8R
  1,  83,  84, 125, 124,   1,   2,  43,  42
  2,  84,  85, 126, 125,   2,   3,  44,  43
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*Nset, nset=_PickedSet2, internal, generate
   1,  902,    1
*Elset, elset=_PickedSet2, internal, generate
   1,  400,    1
*Nset, nset=FixSet
  16,  26,  57,  67,  98, 108
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** Section: Sec_Wall
*Solid Section, elset=_PickedSet2, controls=EC-1, material=Concrete_C40
,
*End Part
**
**
** ASSEMBLY
**
*Assembly, name=Assembly
**
*Instance, name=Wall, part=Wall
       -250.,           0.,           0.
*End Instance
**
*Instance, name=Drone, part=Drone
      -1000.,           0.,         250.
      -1000.,           0.,         250.,       -1000.,           1.,         250.,          90.
*End Instance
**
** Drone node set for initial velocity
*Nset, nset=DroneSet, instance=Drone
1, 2, 3, 4, 5, 6
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*End Assembly
**
** ELEMENT CONTROLS
**
*Section Controls, name=EC-1, hourglass=ENHANCED
1., 1., 1.
**
** MATERIALS
**
*Material, name=Aluminum_7075
*Density
 2.81e-09,
*Elastic
71700., 0.33
*Plastic
503.,   0.
572., 0.05
610.,  0.1
*Material, name=Concrete_C40
*Density
 2.4e-09,
*Elastic
32500., 0.2
*Concrete Damaged Plasticity
38.,   0.1,  1.16, 0.667,    0.
*Concrete Compression Hardening
20.,    0.
38., 0.003
10.,  0.01
*Concrete Tension Stiffening
 3.2,     0.
  1., 0.0005
 0.1,  0.002
*Concrete Compression Damage
  0.,    0.
 0.5, 0.005
 0.9,  0.01
*Concrete Tension Damage
   0.,     0.
  0.7, 0.0005
 0.95,  0.002
**
** INTERACTION PROPERTIES
**
*Surface Interaction, name=GenContact
*Friction
0.,
*Surface Behavior, pressure-overclosure=HARD
**
** BOUNDARY CONDITIONS
**
** Name: BC_Fix Type: Symmetry/Antisymmetry/Encastre
*Boundary
Wall.FixSet, ENCASTRE
**
** INTERACTIONS
**
** Interaction: GeneralContact
*Contact, op=NEW
*Contact Inclusions, ALL EXTERIOR
** ----------------------------------------------------------------
**
** ----------------------------------------------------------------
** INITIAL CONDITIONS - DRONE VELOCITY
*Initial Conditions, type=VELOCITY
DroneSet, 1, 600000.0
DroneSet, 2, 0.0
DroneSet, 3, 0.0
**
** STEP: Impact
**
*Step, name=Impact, nlgeom=YES
*Dynamic, Explicit
, 0.015
*Bulk Viscosity
0.06, 1.2
**
** INTERACTIONS
**
** Interaction: GeneralContact
*Contact, op=NEW
*Contact Inclusions, ALL EXTERIOR
**
** OUTPUT REQUESTS
**
*Restart, write, number interval=1, time marks=NO
**
** FIELD OUTPUT: F-Output-1
**
*Output, field, number interval=50
*Node Output
A, U, V
*Element Output, directions=YES
DAMAGEC, DAMAGET, E, PEEQ, S, SDEG, STATUS
**
** HISTORY OUTPUT: H-Output-1
**
*Output, history, time interval=0.00015
*Energy Output
ALLAE, ALLIE, ALLKE, ALLPD, ALLSE, ALLVD, ALLWK, ETOTAL
*End Step
